Simulations: Version=210
  DataStore
  Experiment Exp
    Factors
      Permutation
        Factor Irrigation: Specification=[CentrePivot].Script.AllowIrrigation =  false, true
        Factor Treatment: Specification=[Treatment].Script.TreatmentType =  Urine, Control
        Factor Year: Specification=[DateChanger].Script.Year = 2023 to 2023 step 1
        Factor Month: Specification=[DateChanger].Script.Month = 1 to 1 step 1
        Factor Day: Specification=[DateChanger].Script.Day = 15
    Simulation Base
      Manager DateChanger
        Year = 1900
        Month = 1
        Day = 15
```csharp
using System;
using System.Xml.Serialization;
using APSIM.Shared.Utilities;
using Models.Interfaces;
using Models.Core;
using Models.PMF;
using Models.Soils;
using Models.WaterModel;

namespace Models
{
	[Serializable]
	public class DateChangerScript : Model
	{
		//> Links to other Apsim models
		[Link] private Clock clock;
        [Link] private ISummary summary;
	
		[Separator("Change the start and end date from the factor levels")]


		[Description("Year of interest")]
		public int Year {get; set;}

		[Description("Month of interest")]
		public int Month {get; set;}

		[Description("Day of interest")]
		public int Day {get; set;}

		[XmlIgnore] public string DateAsString {get; set;}
		[XmlIgnore] public DateTime ApplicationDate {get; set;}
		[XmlIgnore] public DateTime ApplicationDateMinus1 {get; set;}
		//[XmlIgnore] public DateTime ApplicationDatePlus120 {get; set;}
		[XmlIgnore] public DateTime ApplicationDatePlus140 {get; set;}
		[XmlIgnore] public int DaysSinceApplication {get; set;}
		

		[XmlIgnore] public DateTime ApplicationDateMinus8 {get; set;}
		[XmlIgnore] public DateTime ApplicationDateMinus7 {get; set;}
		[XmlIgnore] public DateTime ApplicationDatePlus1 {get; set;}
		[XmlIgnore] public DateTime ApplicationDatePlus3 {get; set;}
		[XmlIgnore] public DateTime ApplicationDatePlus7 {get; set;}
		[XmlIgnore] public DateTime ApplicationDatePlus30 {get; set;}
		[XmlIgnore] public DateTime ApplicationDatePlus60 {get; set;}
		[XmlIgnore] public DateTime ApplicationDatePlus90 {get; set;}  // 3 months
		[XmlIgnore] public DateTime ApplicationDatePlus120 {get; set;}  // 4 months
		[XmlIgnore] public DateTime ApplicationDatePlus150 {get; set;}  // 5 months
		[XmlIgnore] public DateTime ApplicationDatePlus180 {get; set;}   // 6 mpnths
		[XmlIgnore] public DateTime ApplicationDatePlus270 {get; set;}   // 9 mpnths
		[XmlIgnore] public DateTime ApplicationDatePlus360 {get; set;}   // 12 mpnths



		[EventSubscribe("Commencing")]
		private void OnComencing(object sender, EventArgs e)
		{

            DateAsString = Day + "-" + Month + "-" + Year;
            ApplicationDate = new DateTime(Year, Month, Day);
            
            clock.StartDate = ApplicationDate.AddMonths(-3);
            clock.EndDate = ApplicationDate.AddYears(1);
            
            //ApplicationDatePlus140 = ApplicationDate.AddDays(140);

            ApplicationDateMinus8 = ApplicationDate.AddDays(-8);   // just for zeroing
            ApplicationDateMinus7 = ApplicationDate.AddDays(-7);
            ApplicationDateMinus1 = ApplicationDate.AddDays(-1);
            ApplicationDatePlus1 = ApplicationDate.AddDays(0);
            ApplicationDatePlus3 = ApplicationDate.AddDays(2);
            ApplicationDatePlus7 = ApplicationDate.AddDays(6);
            ApplicationDatePlus30 = ApplicationDate.AddDays(29);
            ApplicationDatePlus60 = ApplicationDate.AddDays(59);
            ApplicationDatePlus90 = ApplicationDate.AddDays(89);
            ApplicationDatePlus120 = ApplicationDate.AddDays(119);
            ApplicationDatePlus150 = ApplicationDate.AddDays(149);
            ApplicationDatePlus180 = ApplicationDate.AddDays(179);
            ApplicationDatePlus270 = ApplicationDate.AddDays(269);
            ApplicationDatePlus360 = ApplicationDate.AddDays(359);
            
		}
		
		[EventSubscribe("StartOfSimulation")]
		private void OnStartOfSimulation(object sender, EventArgs e)
		{
            summary.WriteMessage(this, "The simulation start date will be " + clock.StartDate, MessageType.Information);
            summary.WriteMessage(this, "The application date will be " + ApplicationDate, MessageType.Information);
            summary.WriteMessage(this, "The simulation end date will be " + clock.EndDate, MessageType.Information);
            
		}
		
		[EventSubscribe("StartOfDay")]
		private void OnStartOfDay(object sender, EventArgs e)
		{
		}
		
		[EventSubscribe("DoManagement")]
		private void OnDoManagement(object sender, EventArgs e)
		{
		    DaysSinceApplication = (clock.Today - ApplicationDateMinus1).Days;
		}
		
	}
}
```
      Clock: Start=1980-01-01; End=1982-04-16
      Weather: FileName=28720.met
      MicroClimate: a_interception=0; b_interception=1; c_interception=0; d_interception=0; SoilHeatFluxFraction=0.4; MinimumHeightDiffForNewLayer=0; NightInterceptionFraction=0.5; ReferenceHeight=2
      Forages
        Parameters:
          Name                          LiveDigestibility  DeadDigestibility  LiveFractionConsumable  DeadFractionConsumable  LiveMinimumBiomass  DeadMinimumBiomass
          SurfaceOrganicMatter.Residue  0.7                0.3                0                       0                       100                 0
          AGPRyegrass.Leaf              FromModel          FromModel          1                       1                       10                  0
          AGPRyegrass.Stem              FromModel          FromModel          1                       1                       10                  0
          AGPRyegrass.Stolon            FromModel          FromModel          1                       1                       10                  0
          AGPWhiteClover.Leaf           FromModel          FromModel          1                       1                       10                  0
          AGPWhiteClover.Stem           FromModel          FromModel          1                       1                       10                  0
          AGPWhiteClover.Stolon         FromModel          FromModel          1                       1                       10                  0
      SoilArbitrator
      Summary SummaryFile
      Zone Block: Area=1; Slope=0; AspectAngle=0; Altitude=0
        Manager ContingentCentrePivot (disabled)
          AllowIrrigation = True
          CriticalAnnualAverageRainfall = 1150
          IrrigStart = 1-sep
          IrrigEnd = 30-apr
          SoilDepth = 500
          CritPAWForShallow = 60
          CritRainToPause = 30
          DaysToPauseOnCritRain = 3
          IrrigReturnShallow = 2
          IrrigAmtShallow = 10
          PercPAWIrrigDeficitShallow = 30
          IrrigEffShallow = 100
          IrrigReturnDeep = 4
          IrrigAmtDeep = 20
          IrrigDeficitDeep = 25
          IrrigEffDeep = 100
```csharp
using Models.Soils;
using System;
using System.Linq;
using System.Diagnostics;
using System.IO;
using Models.Core;
using Models.Interfaces;
using Models.Climate;
using APSIM.Shared.Utilities;

namespace Models
{
    [Serializable]
    public class Script : Model
    {
        [Link] Clock clock;
        [Link] Weather weather;
        [Link] Irrigation irrigation;
        [Link] ISummary summary;
        [Link] Physical physical;
        [Link] Water water;


        [Separator("Permit or disallow irrigation")]

        [Description(" Turn automatic irrigation on?")]
        public bool AllowIrrigation { get; set; }

        [Description("      ... but not when annual average rainfall exceeds a value of (mm)")]
        public double CriticalAnnualAverageRainfall { get; set; }

        [Separator("All soils")]

        [Description("Start of irrigation season (dd-mmm)")] 
        public string IrrigStart { get; set; }

        [Description("End of irrigation season (dd-mmm)")] 
        public string IrrigEnd { get; set; }

        [Description("Enter the depth to which water deficit is computed (mm)")] 
        public double SoilDepth { get; set; }
        
        [Description("PAW below which soil is considered 'shallow' (mm)")] 
        public double CritPAWForShallow { get; set; }

        [Description("Amount of rainfall over the last 3 days to cause pause to irrigator (mm)")] 
        public double CritRainToPause { get; set; }

        [Description("Number of days to pause irrigator after critical delay (days)")] 
        public double DaysToPauseOnCritRain { get; set; }
        
        [Separator("Shallow soils")]
        
        [Description("Irrigation return period for shallow soils (days)")] 
        public double IrrigReturnShallow { get; set; }

        [Description("Effective irrigation amount for shallow soils (mm)")] 
        public double IrrigAmtShallow { get; set; }

        [Description("Percentage of PAW at which to irrigate shallow soils (%)")] 
        public double PercPAWIrrigDeficitShallow { get; set; }

        [Description("Irrigation efficiency for shallow soils (%)")] 
        public double IrrigEffShallow { get; set; }

        [Separator("Deep soils")]
        
        [Description("Irrigation return period for deep soils (days)")] 
        public double IrrigReturnDeep { get; set; }

        [Description("Effective irrigation amount for deep soils (mm)")] 
        public double IrrigAmtDeep { get; set; }

        [Description("Soil water deficit at which to irrigate deep soils (mm)")] 
        public double IrrigDeficitDeep { get; set; }

        [Description("Irrigation efficiency for deep soils (%)")] 
        public double IrrigEffDeep { get; set; }


        // Output variables
        [Units("mm")]
        public double TodayDeficit {get; set; }
         
        [Units("mm")]
        public double TodayDeficit_nve {get; set; }
         
        [Units("")]
        public double IrrigDay {get; set; }
         
        [Units("")]
        public double SoilPAW {get; set; }
         
        [Units("")]
        public double IrrigDeficit {get; set; }
        
        [Units("")]
        public double IrrigReturn {get; set; }
        
        [Units("")]
        public double IrrigAmt {get; set; }
        
        [Units("")]
        public double IrrigEff {get; set; }
        
        [Units("mm")]
        public double Rain3 {get; set; }
        
        [Units("mm")]
        public double[] Rain_3 {get; set; } = new double[3];
        
        [Units("")]
        public double Days2Pause {get; set; }

         // private variables
        private double irrigDeficitShallow {get; set; }

         // private variables
        private double AnnualAverageRainfall {get; set; }

        
        [EventSubscribe("StartOfSimulation")]
        private void OnStartOfSimulation(object sender, EventArgs e)
        {
            AnnualAverageRainfall = GetAverageAnnualRainfallFromFile(weather.FullPath + weather.FileName);
            
            if ((AllowIrrigation) && (AnnualAverageRainfall <= CriticalAnnualAverageRainfall))
            {
            
                IrrigDay = 5000;  // so will reset to 1 on first day
    
                Rain3 = 0.0;
                Rain_3[0] = 0.0; Rain_3[1] = 0.0; Rain_3[2] = 0.0;
    
                SoilPAW = 0.0;
                double mySoilDepth = 0;
                for (int z = 0; z <= physical.Thickness.Length - 1; z++)
                {
                    mySoilDepth = mySoilDepth + physical.Thickness[z];
                    if (mySoilDepth <= SoilDepth)
                        SoilPAW = SoilPAW + physical.DULmm[z] - physical.LL15mm[z];
                }

                if (SoilPAW <= CritPAWForShallow)
                {
                    IrrigDeficit = PercPAWIrrigDeficitShallow / (double)100 * SoilPAW;
                    IrrigReturn = IrrigReturnShallow;
                    IrrigAmt = IrrigAmtShallow;
                    IrrigEff = IrrigEffShallow;
                    summary.WriteMessage(this, "Soil is considered to be shallow " + CritPAWForShallow + " " + SoilPAW, MessageType.Information);
                }
                else
                {
                    IrrigDeficit = IrrigDeficitDeep;
                    IrrigReturn = IrrigReturnDeep;
                    IrrigAmt = IrrigAmtDeep;
                    IrrigEff = IrrigEffDeep;
                    summary.WriteMessage(this, "Soil is considered to be deep", MessageType.Information);
                }

                summary.WriteMessage(this, $"Irrigation critical deficit (mm): {IrrigDeficit}", MessageType.Information);
                summary.WriteMessage(this, $"        Irrigation return (days): {IrrigReturn}", MessageType.Information);
                summary.WriteMessage(this, $"   Irrigation pumped amount (mm): {IrrigAmt}", MessageType.Information);
                summary.WriteMessage(this, $"       Irrigation efficiency (%): {IrrigEff}", MessageType.Information);
            }
        }
        
        
        [EventSubscribe("DoManagement")]
        private void OnDoManagement(object sender, EventArgs e)
        {
            if (AllowIrrigation)
            {

                Rain_3[2] = Rain_3[1];
                Rain_3[1] = Rain_3[0];
                Rain_3[0] = weather.Rain;
                Rain3 = Rain_3[0] + Rain_3[1] + Rain_3[2];
                if (Rain3 >= CritRainToPause)
                    Days2Pause = DaysToPauseOnCritRain;
                else
                    Days2Pause = Days2Pause - 1;

                TodayDeficit = 0.0;
                SoilPAW = 0.0;
                double mySoilDepth = 0;

                for (int z = 0; z <= physical.Thickness.Length - 1; z++)
                {
                    mySoilDepth = mySoilDepth + physical.Thickness[z];
                    if (mySoilDepth <= SoilDepth)
                    {
                        SoilPAW = SoilPAW + physical.DULmm[z] - physical.LL15mm[z];
                        TodayDeficit = TodayDeficit + physical.DULmm[z] - Math.Min(physical.DULmm[z], water.MM[z]);
                    }
                }
                TodayDeficit_nve = -1 * TodayDeficit;
    
                if (DateUtilities.WithinDates(IrrigStart, clock.Today, IrrigEnd))
                {
                    if (SoilPAW <= CritPAWForShallow)
                    {
                        IrrigDeficit = PercPAWIrrigDeficitShallow / 100 * SoilPAW;
                        IrrigReturn = IrrigReturnShallow;
                        IrrigAmt = IrrigAmtShallow;
                        IrrigEff = IrrigEffShallow;
                    }
                    else
                    {
                        IrrigDeficit = IrrigDeficitDeep;
                        IrrigReturn = IrrigReturnDeep;
                        IrrigAmt = IrrigAmtDeep;
                        IrrigEff = IrrigEffDeep;
                    }

                    if (Days2Pause < 0.5)
                    {
                        IrrigDay = IrrigDay + 1;
                        if (IrrigDay > IrrigReturn)
                            IrrigDay = 1;// and day = 1 is when the irrigation happens
    
                        if (TodayDeficit >= IrrigDeficit)
                        {
                            if (IrrigDay == 1)
                                irrigation.Apply(amount: IrrigAmt / (IrrigEff / 100.0));
                        }
                    }
                }
            }
        }    
        
        
        private double GetAverageAnnualRainfallFromFile(string fileName)
        {
            using StreamReader reader = new StreamReader(fileName);
            string line;
            while ((line = reader.ReadLine()) != null)
            {
                if (line.StartsWith("!     Annual"))
                {
                    string[] tokens = line.Split(' ', StringSplitOptions.RemoveEmptyEntries);
                    if (tokens.Length == 10)
                        return Convert.ToDouble(tokens[4]);
                }            
            }
            
            throw new Exception($"Cannot find average annual rainfall amount in file: {fileName}");
        }        
    }
}
```
        Manager CentrePivot
          AllowIrrigation = True
          IrrigStart = 1-sep
          IrrigEnd = 30-apr
          SoilDepth = 500
          CritPAWForShallow = 60
          CritRainToPause = 30
          DaysToPauseOnCritRain = 3
          IrrigReturnShallow = 2
          IrrigAmtShallow = 10
          PercPAWIrrigDeficitShallow = 30
          IrrigEffShallow = 100
          IrrigReturnDeep = 4
          IrrigAmtDeep = 20
          IrrigDeficitDeep = 25
          IrrigEffDeep = 100
```csharp
using Models.Soils;
using System;
using System.Linq;
using System.Diagnostics;
using Models.Core;
using Models.Interfaces;
using APSIM.Shared.Utilities;

namespace Models
{
    [Serializable]
    public class Script : Model
    {
        [Link] Clock clock;
        [Link] IWeather weather;
        [Link] Irrigation irrigation;
        [Link] ISummary summary;
        [Link] Physical physical;
        [Link] Water water;
    
        [Separator("Permit or disallow irrigation")]

        [Description(" Turn automatic irrigation on?")]
        public bool AllowIrrigation { get; set; }

        [Separator("All soils")]

        [Description("Start of irrigation season (dd-mmm)")] 
        public string IrrigStart { get; set; }

        [Description("End of irrigation season (dd-mmm)")] 
        public string IrrigEnd { get; set; }

        [Description("Enter the depth to which water deficit is computed (mm)")] 
        public double SoilDepth { get; set; }
        
        [Description("PAW below which soil is considered 'shallow' (mm)")] 
        public double CritPAWForShallow { get; set; }

        [Description("Amount of rainfall over the last 3 days to cause pause to irrigator (mm)")] 
        public double CritRainToPause { get; set; }

        [Description("Number of days to pause irrigator after critical delay (days)")] 
        public double DaysToPauseOnCritRain { get; set; }
        
        [Separator("Shallow soils")]
        
        [Description("Irrigation return period for shallow soils (days)")] 
        public double IrrigReturnShallow { get; set; }

        [Description("Effective irrigation amount for shallow soils (mm)")] 
        public double IrrigAmtShallow { get; set; }

        [Description("Percentage of PAW at which to irrigate shallow soils (%)")] 
        public double PercPAWIrrigDeficitShallow { get; set; }

        [Description("Irrigation efficiency for shallow soils (%)")] 
        public double IrrigEffShallow { get; set; }

        [Separator("Deep soils")]
        
        [Description("Irrigation return period for deep soils (days)")] 
        public double IrrigReturnDeep { get; set; }

        [Description("Effective irrigation amount for deep soils (mm)")] 
        public double IrrigAmtDeep { get; set; }

        [Description("Percentage of PAW at which to irrigate deep soils (%)")] 
        public double IrrigDeficitDeep { get; set; }

        [Description("Irrigation efficiency for deep soils (%)")] 
        public double IrrigEffDeep { get; set; }


        // Output variables
        [Units("mm")]
        public double TodayDeficit {get; set; }
         
        [Units("mm")]
        public double TodayDeficit_nve {get; set; }
         
        [Units("")]
        public double IrrigDay {get; set; }
         
        [Units("")]
        public double SoilPAW {get; set; }
         
        [Units("")]
        public double IrrigDeficit {get; set; }
        
        [Units("")]
        public double IrrigReturn {get; set; }
        
        [Units("")]
        public double IrrigAmt {get; set; }
        
        [Units("")]
        public double IrrigEff {get; set; }
        
        [Units("mm")]
        public double Rain3 {get; set; }
        
        [Units("mm")]
        public double[] Rain_3 {get; set; } = new double[3];
        
        [Units("")]
        public double Days2Pause {get; set; }

         // private variables
        private double irrigDeficitShallow {get; set; }

        
        [EventSubscribe("StartOfSimulation")]
        private void OnStartOfSimulation(object sender, EventArgs e)
        {

            if (AllowIrrigation)
            {
                IrrigDay = 5000;  // so will reset to 1 on first day

                Rain3 = 0.0;
                Rain_3[0] = 0.0; Rain_3[1] = 0.0; Rain_3[2] = 0.0;

                SoilPAW = 0.0;
                double mySoilDepth = 0;
                for (int z = 0; z <= physical.Thickness.Length - 1; z++)
                {
                    mySoilDepth = mySoilDepth + physical.Thickness[z];
                    if (mySoilDepth <= SoilDepth)
                        SoilPAW = SoilPAW + physical.DULmm[z] - physical.LL15mm[z];
                }
                if (SoilPAW <= CritPAWForShallow)
                {
                    IrrigDeficit = PercPAWIrrigDeficitShallow / (double)100 * SoilPAW;
                    IrrigReturn = IrrigReturnShallow;
                    IrrigAmt = IrrigAmtShallow;
                    IrrigEff = IrrigEffShallow;
                    summary.WriteMessage(this, "Soil is considered to be shallow " + CritPAWForShallow + " " + SoilPAW, MessageType.Information);
                }
                else
                {
                    IrrigDeficit = IrrigDeficitDeep;
                    IrrigReturn = IrrigReturnDeep;
                    IrrigAmt = IrrigAmtDeep;
                    IrrigEff = IrrigEffDeep;
                    summary.WriteMessage(this, "Soil is considered to be deep", MessageType.Information);
                }

                summary.WriteMessage(this, $"Irrigation critical deficit (mm): {IrrigDeficit}", MessageType.Information);
                summary.WriteMessage(this, $"        Irrigation return (days): {IrrigReturn}", MessageType.Information);
                summary.WriteMessage(this, $"   Irrigation pumped amount (mm): {IrrigAmt}", MessageType.Information);
                summary.WriteMessage(this, $"       Irrigation efficiency (%): {IrrigEff}", MessageType.Information);
            }
        }
        
        
        [EventSubscribe("DoManagement")]
        private void OnDoManagement(object sender, EventArgs e)
        {
            if (AllowIrrigation)
            {
                Rain_3[2] = Rain_3[1];
                Rain_3[1] = Rain_3[0];
                Rain_3[0] = weather.Rain;
                Rain3 = Rain_3[0] + Rain_3[1] + Rain_3[2];
                if (Rain3 >= CritRainToPause)
                    Days2Pause = DaysToPauseOnCritRain;
                else
                    Days2Pause = Days2Pause - 1;
    
                TodayDeficit = 0.0;
                SoilPAW = 0.0;
                double mySoilDepth = 0;
    
                for (int z = 0; z <= physical.Thickness.Length - 1; z++)
                {
                    mySoilDepth = mySoilDepth + physical.Thickness[z];
                    if (mySoilDepth <= SoilDepth)
                    {
                        SoilPAW = SoilPAW + physical.DULmm[z] - physical.LL15mm[z];
                        TodayDeficit = TodayDeficit + physical.DULmm[z] - Math.Min(physical.DULmm[z], water.MM[z]);
                    }
                }
                TodayDeficit_nve = -1 * TodayDeficit;
    
                if (DateUtilities.WithinDates(IrrigStart, clock.Today, IrrigEnd))
                {
                    if (SoilPAW <= CritPAWForShallow)
                    {
                        IrrigDeficit = PercPAWIrrigDeficitShallow / 100 * SoilPAW;
                        IrrigReturn = IrrigReturnShallow;
                        IrrigAmt = IrrigAmtShallow;
                        IrrigEff = IrrigEffShallow;
                    }
                    else
                    {
                        IrrigDeficit = IrrigDeficitDeep;
                        IrrigReturn = IrrigReturnDeep;
                        IrrigAmt = IrrigAmtDeep;
                        IrrigEff = IrrigEffDeep;
                    }
    
                    if (Days2Pause < 0.5)
                    {
                        IrrigDay = IrrigDay + 1;
                        if (IrrigDay > IrrigReturn)
                            IrrigDay = 1;// and day = 1 is when the irrigation happens
    
                        if (TodayDeficit >= IrrigDeficit)
                        {
                            if (IrrigDay == 1)
                                irrigation.Apply(amount: IrrigAmt / (IrrigEff / 100.0));
                        }
                    }
                }
            }
        }    
    }
}
```
        Manager Treatment
          TreatmentType = Fertiliser
```csharp
using APSIM.Core;
using System.Linq;
using System.Collections.Generic;
using Models.Surface;
using Models.Soils.Nutrients;
using Models.WaterModel;
using Models.Soils;
using Models.PMF;
using Models.Core;
using Models.Interfaces;
using APSIM.Shared.Utilities;
using System.Xml.Serialization;
using System;

namespace Models
{
    [Serializable]
    public class TreatmentScript : Model, IStructureDependency
    {
        [Link] private Clock clock;
        [Link] private IPhysical physical;
        [Link] private WaterBalance waterBalance;
        [Link] private ISummary summary;
        [Link] private Fertiliser fertiliser;
        [Link] private Irrigation irrigation;
        [Link] private Nutrient nutrient;
        [Link] private DateChangerScript dateChangerScript;
        [Link] private Report report;
        [Link] private SurfaceOrganicMatter surfaceOrganicMatter;
        [Link] private IWeather weather;
        
        public IStructure Structure { private get; set; }
        //> Links to other Apsim models
//        [Link] private Nitrification nitrification;

        
        [Separator("Initialises the experiment and controls the treatment applications of urine, dung and fertiliser")]
        [Separator("     Control - no N, no water")]
        [Separator("     Urine - 600 kg urea-N distributed to 175 mm, 10 mm water")]
        [Separator("     Dung - 1100 kg N and 15,000 kg C /ha as ruminant dung to SurfaceOrganicMatter, 25 mm water")]
        [Separator("     Fertiliser - 50 kg/ha urea-N, no water")]
        [Separator("     ")]
        [Separator("     Updated the dung incorporation")]

        [Description("Treatment type")]
        public TreatmentTypes TreatmentType {get; set;}

        //[XmlIgnore] public double Slope {get; set;}   // percent

        [XmlIgnore] public DateTime myApplicationDate {get; set;}
        
        [XmlIgnore] public double NApplied { get; set; }
        [XmlIgnore] public double UrineDepth { get; set; }
        [XmlIgnore] public double[] weights { get; set; }

        [XmlIgnore] public double[] weights200mm { get; set; }
        [XmlIgnore] public double[] weights150mm { get; set; }
        [XmlIgnore] public double[] weights175mm { get; set; }
        
        [XmlIgnore] public double relativeWaterContent { get; set; }
        [XmlIgnore] public double VolatilisationRate { get; set; }
        [XmlIgnore] public double VolatilisationLoss { get; set; }

        [Units("mm")]
        public double Rain3 {get; set; }
        
        [Units("mm")]
        public double[] Rain_3 {get; set; } = new double[3];
        


/*      Volatilization was essentially complete after 100-200 hours. Mean volatilization losses from urine treated plots were 
            22.2% of the applied nitrogen (N) in summer, 
            24.6% in autumn and 
            12.2% in winter. Corresponding losses from the 
            urea treated plots were 17.9%, 28.9% and 8.5%.
            https://hdl.handle.net/10182/1620 Sherlock thesis   
            
            Ammonia volatilisation losses from fertiliser are typically <15% of the N applied, Gray https://doi.org/10.1080/00288233.2023.2198719
            
                */

        
        [EventSubscribe("StartOfSimulation")]
        private void OnStartOfSimulation(object sender, EventArgs e)
        {
            NApplied = 0.0;
            UrineDepth = 175.0;
            myApplicationDate = dateChangerScript.ApplicationDate;

            Rain3 = 0.0;
            Rain_3[0] = 0.0; Rain_3[1] = 0.0; Rain_3[2] = 0.0;
            
        }
        
        [EventSubscribe("StartOfDay")]
        private void OnStartOfDay(object sender, EventArgs e)
        {
        }
        
        [EventSubscribe("DoManagement")]
        private void OnDoManagement(object sender, EventArgs e)
        {

            Rain_3[2] = Rain_3[1];
            Rain_3[1] = Rain_3[0];
            Rain_3[0] = weather.Rain + irrigation.IrrigationApplied;
            Rain3 = Rain_3[0] + Rain_3[1] + Rain_3[2];
            VolatilisationLoss = 0.0;

            if (clock.Today == myApplicationDate)
            {
                // find the volatilisation rate
                   if ((clock.Today.Month <= 4) || (clock.Today.Month >= 9))
                       VolatilisationRate = 0.2;
                   else 
                       VolatilisationRate = 0.1;

                if (TreatmentType.ToString() == "Control")
                    {
                        NApplied = 0.0;
                        VolatilisationRate = 0.0;
                        VolatilisationLoss = 0.0;
                    }
                else if (TreatmentType.ToString() == "Urine")
                {

                    VolatilisationLoss = VolatilisationRate * 600.0;
                    weights = GetLayerWeightsForDistribution(UrineDepth);
                    
                    double cumulativeDepth = 0.0;
                    for (int i = 0; i < physical.Thickness.Length; i++)
                    {
                        cumulativeDepth += physical.Thickness[i];
                        //if (weights200mm[i] > 0.0)
                        //{
                            fertiliser.Apply((600.0 - VolatilisationLoss) * weights[i], "UreaN", cumulativeDepth - (physical.Thickness[i] / 2.0) );
                            irrigation.Apply(amount: 10.0 * weights[i], depth: (cumulativeDepth - (physical.Thickness[i] / 2.0)), efficiency: 1.0, willRunoff: false, nh4: 0.0);
                        //}  
                        NApplied += 600.0 * weights[i];
                    }
                    
                }
                else if (TreatmentType.ToString() == "Dung")
                {
                    VolatilisationRate = 0.0;
                    VolatilisationLoss = 0.0;

                    surfaceOrganicMatter.Add(mass: 15000.0, N: 1100.0, P: 0.0, type: "RuminantDung_PastureFed", name: "Manure", fractionStanding: 0.0, no3: 0.0, nh4: 0.0);
                    irrigation.Apply(amount: 25.0, depth: 0.0, efficiency: 1.0, willRunoff: false, nh4: 0.0);
                    NApplied = 1100;
                    
                    Simulation sim =   Structure.FindParent<Simulation>(recurse: true) as Simulation;
                    ResidueTypes rts =   Structure.FindChild<ResidueTypes>(recurse: true, relativeTo: (INodeModel)sim) as ResidueTypes;
                    foreach(ResidueType rt in rts.ResidueType) 
                        {rt.pot_decomp_rate = 0.05;}
                    
                }
                else if (TreatmentType.ToString() == "Fertiliser")
                {
                     VolatilisationLoss = VolatilisationRate * 50.0;

                   // no water after the fertiliser
                    fertiliser.Apply((50.0 - VolatilisationLoss), "UreaN", 0.0);
                    summary.WriteMessage(this, "N addition of 50 kg N /ha to the soil surface", MessageType.Information); 
                    NApplied = 50.0;
                }
                else
                    throw new Exception(TreatmentType + " is not a valid treatment type");
            }
            
            if (TreatmentType.ToString() == "Dung")
            {
                if ((clock.Today >= myApplicationDate) && ((surfaceOrganicMatter.LyingWt + surfaceOrganicMatter.StandingWt) > 25.0))
                {
                    double criticalWaterContent = (physical.DUL[1] - (physical.DUL[1] - physical.LL15[1])/3.0);
                    if (Rain3 > 10.0)
                        relativeWaterContent = 1.0;
                    else if (waterBalance.SW[1] < criticalWaterContent)  
                        relativeWaterContent = 0.0;
                    else if (waterBalance.SW[1] < physical.DUL[1])
                        relativeWaterContent = 1.0 - (waterBalance.SW[1] - criticalWaterContent) / (physical.DUL[1] - criticalWaterContent);
                    else 
                        relativeWaterContent = 1.0;
                        
                    double fraction = 0.1; 
                    surfaceOrganicMatter.Incorporate(fraction: fraction * relativeWaterContent, depth: 100.0, doOutput: false);
                         
                    
                }

            }
    

        }
        
        
        private double[] GetLayerWeightsForDistribution(double thisDepth)
        {
            double[] weights = new double[physical.Thickness.Length];
            double cumDepth = 0;
            double initialSum = 0.0;
            for (int i = 0; i < physical.Thickness.Length; i++)
            {
                cumDepth += physical.Thickness[i];    // the end depth of the current layer
                if (cumDepth < thisDepth)             // all the layer is within the deposition depth
                    weights[i] = 1.0;    
                else if (cumDepth - physical.Thickness[i] <= thisDepth)
                    weights[i] = (thisDepth - (cumDepth - physical.Thickness[i])) / physical.Thickness[i];    // part of this layer will contribute
                else
                    weights[i] = 0;                 // non of this layer will contribute
                
                initialSum += weights[i];
            }
            
            for (int i = 0; i < physical.Thickness.Length; i++)
            {
                weights[i] /= initialSum;
            }
            
            return weights;
        }


        /// <summary>Treatment types</summary>
        public enum TreatmentTypes
        {
            /// <summary>Control</summary>
            Control,
            
            /// <summary>Urine</summary>
            Urine,
            
            /// <summary>Dung</summary>
            Dung,
            
            /// <summary>Fertiliser</summary>
            Fertiliser
        }
    }
}
```
        SimpleGrazing: GrazingRotationType=1; SimpleMinGrazable=0; SimpleGrazingResidual=0; FlexibleGrazePostDM=0; MaximumRotationLengthArray=[60, 60, 60, 60, 60, 60, 60, 60, 60, 60, 60, 60]; MinimumRotationLengthArray=[15, 15, 15, 15, 15, 15, 15, 15, 15, 15, 15, 15]; IsCutAndCarry=false; FractionClippingsReturned=0; FractionIntakeNToAnimal=[0.6]; DungNConc=2.6; FractionOfDungUrineOffPaddock=[0.6]; DepthUrineIsAdded=150; ShowAdvancedExcretaOptions=false; SendDungElsewhere=1; SendUrineElsewhere=1; UsePatching=false; PseudoPatches=true; ZoneCount=25; UrineReturnPattern=2; PseudoRandomSeed=666; MaxEffectiveNConcentration=3.5; FractionPopulationDecline=0; TramplingOn=false; MaximumPropLitterMovedToSoil=0.1; PastureConsumedAtMaximumRateOfLitterRemoval=1200
          PreGrazeDMArray=[2500, 2500, 2500, 2500, 2500, 2500, 2500, 2500, 2500, 2500, 2500, 2500]
          PostGrazeDMArray=[1250, 1250, 1250, 1250, 1250, 1250, 1250, 1250, 1250, 1250, 1250, 1250]
        Manager Outputs
```csharp
using System;
using System.Xml.Serialization;
using APSIM.Shared.Utilities;
using Models.Interfaces;
using Models.Core;
using Models.PMF;
using Models.Soils;
using Models.Soils.Nutrients;
using Models.Soils.SoilTemp;
using System.Diagnostics;
using Models.WaterModel;
using System.Linq;

namespace Models
{
    [Serializable]
    [System.Xml.Serialization.XmlInclude(typeof(Model))]
    public class Script : Model
    {
        [Link] private Clock clock;
        [Link] private IPhysical physical;
        [Link] private ISoilWater soilWater;
        [Link] private Nutrient nutrient;
        [Link] private SoilTemperature temperature; 
        [Link(ByName = true)] private ISolute urea;
        [Link(ByName = true)] private ISolute nH4;
        [Link(ByName = true)] private ISolute nO3;
        [Link] private ISummary summary;
        //[Link(ByName = true)] private Treatment treatmentScript;
        [Link] private TreatmentScript treatmentScript;
        [Link] private DateChangerScript dateChangerScript;
        [Link] private Report report;


        [XmlIgnore] public double N2O300mm { get; set; }
        [XmlIgnore] public double cumN2O300mm { get; set; }
        [XmlIgnore] public double SoilMinN75mm { get; set; }
        [XmlIgnore] public double SoilTemperature100mm { get; set; }
        [XmlIgnore] public double WFPS75mm { get; set; }
        [XmlIgnore] public double PoreSpace75mm { get; set; }
        [XmlIgnore] public double SoilWater75mm { get; set; }
        [XmlIgnore] public double SoilWaterVol75mm { get; set; }
        [XmlIgnore] public double Air75mm { get; set; }
        [XmlIgnore] public double AirVol75mm { get; set; }
        [XmlIgnore] public double RoughEF { get; set; }

        [XmlIgnore] public int Layer { get; set; }
        [XmlIgnore] public double[] weightsPickLayer100mm { get; set; }
        [XmlIgnore] public double[] weightsPickLayer75mm { get; set; }
        [XmlIgnore] public double[] weights50mm { get; set; }
        [XmlIgnore] public double[] weights75mm { get; set; }
        [XmlIgnore] public double[] weights300mm { get; set; }


        [EventSubscribe("StartOfSimulation")]
        private void OnStartOfSimulation(object sender, EventArgs e)
        {
           //Debugger.Break();

           weights300mm = GetLayerWeightsForOutputting(300.0);
           weights75mm = GetLayerWeightsForOutputting(75.0);
           weights50mm = GetLayerWeightsForOutputting(50.0);
           weightsPickLayer100mm = PickLayerForOutputting(100.0);
           weightsPickLayer75mm = PickLayerForOutputting(75.0);
           cumN2O300mm = 0.0;
           
        }

        [EventSubscribe("DoReportCalculations")]
        private void OnDoReportCalculations(object sender, EventArgs e)
        {
            N2O300mm = 0.0;
            SoilMinN75mm = 0.0;
            AirVol75mm = 0.0;
            SoilTemperature100mm = 0.0;
            SoilWaterVol75mm = 0.0;
            
            double bD75mm = 0.0;
            double poreSpace75mm = 0.0;
            double soilWater75mm = 0.0;
            
            for (int i = 0; i < physical.Thickness.Length; i++)
            {
                N2O300mm += nutrient.N2Oatm[i] * weights300mm[i];
                SoilMinN75mm += (urea.kgha[i] + nH4.kgha[i] + nO3.kgha[i]) * weights75mm[i];
                SoilTemperature100mm += temperature.AverageSoilTemperature[i] * weightsPickLayer100mm[i];
                SoilWaterVol75mm += soilWater.SW[i] * weightsPickLayer75mm[i];
                AirVol75mm += ((1 - (physical.BD[i] / 2.65)) - soilWater.SW[i]) * weightsPickLayer75mm[i];
                
                bD75mm += physical.BD[i] * weightsPickLayer75mm[i]; 
                poreSpace75mm += (1 - (physical.BD[i] / 2.65)) * weights75mm[i];
                soilWater75mm += soilWater.SWmm[i] * weights75mm[i];
            }
            
			if (clock.Today >= dateChangerScript.ApplicationDateMinus1)
                cumN2O300mm += N2O300mm;

            if (treatmentScript.NApplied >= 0.001)
                RoughEF = cumN2O300mm / treatmentScript.NApplied * 100.0; 
            else
                RoughEF = 0.0;
            
            //PoreSpace75mm = 1 - BD75mm / 2.65;
            WFPS75mm = soilWater75mm/(poreSpace75mm * 75.0);
        }

		[EventSubscribe("EndOfDay")]
		private void OnEndOfDay(object sender, EventArgs e)
		{
			/*if (clock.Today == dateChangerScript.ApplicationDateMinus8)
			    report.DoOutput();
			else if (clock.Today == dateChangerScript.ApplicationDateMinus7)
			    report.DoOutput();
			else if (clock.Today == dateChangerScript.ApplicationDateMinus1)
			    report.DoOutput();
			else if (clock.Today == dateChangerScript.ApplicationDatePlus1)
			    report.DoOutput();
			else if (clock.Today == dateChangerScript.ApplicationDatePlus3)
			    report.DoOutput();
			else if (clock.Today == dateChangerScript.ApplicationDatePlus7)
			    report.DoOutput();
			else if (clock.Today == dateChangerScript.ApplicationDatePlus30)
			    report.DoOutput();
			else if (clock.Today == dateChangerScript.ApplicationDatePlus60)
			    report.DoOutput();
			else if (clock.Today == dateChangerScript.ApplicationDatePlus90)
			    report.DoOutput();
			else if (clock.Today == dateChangerScript.ApplicationDatePlus120)
			    report.DoOutput();
			else if (clock.Today == dateChangerScript.ApplicationDatePlus150)
			    report.DoOutput();
			else if (clock.Today == dateChangerScript.ApplicationDatePlus180)
			    report.DoOutput();
			else if (clock.Today == dateChangerScript.ApplicationDatePlus270)
			    report.DoOutput();
			else if (clock.Today == dateChangerScript.ApplicationDatePlus360)
			    report.DoOutput(); */
		}


        private double[] GetLayerWeightsForOutputting(double thisDepth)
        {
            double[] weights = new double[physical.Thickness.Length];
            double cumDepth = 0;
            for (int i = 0; i < physical.Thickness.Length; i++)
            {
                cumDepth += physical.Thickness[i];    // the end depth of the current layer
                if (cumDepth < thisDepth)             // all the layer is within the deposition depth
                    weights[i] = 1.0;    
                else if (cumDepth - physical.Thickness[i] <= thisDepth)
                    weights[i] = (thisDepth - (cumDepth - physical.Thickness[i])) / physical.Thickness[i];    // part of this layer will contribute
                else
                    weights[i] = 0;                 // non of this layer will contribute
            }
            return weights;
        }

        private double[] PickLayerForOutputting(double thisDepth)
        {
            double[] weights = new double[physical.Thickness.Length];
            double cumDepth = 0;
            for (int i = 0; i < physical.Thickness.Length; i++)
            {
                cumDepth += physical.Thickness[i];    // the end depth of the current layer
                if (thisDepth >= (cumDepth - physical.Thickness[i]) && (thisDepth <= cumDepth))
                    weights[i] = 1.0; 
                else
                    weights[i] = 0.0; 
            }
            return weights;
        }
    }
}
```
        Irrigation
        Fertiliser
        SurfaceOrganicMatter: InitialResidueName=grass; InitialResidueType=grass; InitialResidueMass=1000; InitialStandingFraction=0; InitialCPR=0; InitialCNR=25
        PastureSpecies AGPRyegrass: doyGermination=275; daysEmergenceToAnthesis=120; daysAnthesisToMaturity=85; degreesDayForAnthesis=1100; degreesDayForMaturity=900; daysAnnualsFactor=45; CanopyType=PastureSpecies; InitialShootDM=1250; InitialRootDM=450; InitialRootDepth=1000; initialDMFractionsGrasses=[0.15, 0.25, 0.25, 0.05, 0.05, 0.1, 0.1, 0.05, 0, 0, 0]; initialDMFractionsForbs=[0.2, 0.2, 0.15, 0.05, 0.1, 0.15, 0.1, 0.05, 0, 0, 0]; PhotosyntheticEfficiency=0.01; PhotosynthesisCurveFactor=0.8; FractionPAR=0.5; ReferenceCO2=380; CO2EffectScaleFactor=700; CO2EffectOffsetFactor=600; CO2EffectMinimum=0.7; CO2EffectExponent=2; ReproSeasonDurationCoeff=2; ReproSeasonShouldersLengthFactor=1; ReproSeasonOnsetDurationFactor=0.6; RelativeTurnoverEmerging=2; DetachmentDroughtCoefficient=3; DetachmentDroughtEffectMin=0.1; TurnoverStockFactor=0.01; TurnoverDefoliationEffectMin=0.025; MinimumGreenLeafProp=0.8; MinimumGreenRootProp=0.5
          initialDMFractionsLegumes=[0.16, 0.23, 0.22, 0.05, 0.03, 0.05, 0.05, 0.01, 0.04, 0.08, 0.08]
          LinearInterpolationFunction FVPDFunction
        PastureSpecies AGPWhiteClover: doyGermination=275; daysEmergenceToAnthesis=120; daysAnthesisToMaturity=85; degreesDayForAnthesis=1100; degreesDayForMaturity=900; daysAnnualsFactor=45; CanopyType=PastureSpecies; InitialShootDM=500; InitialRootDM=150; InitialRootDepth=350; initialDMFractionsGrasses=[0.15, 0.25, 0.25, 0.05, 0.05, 0.1, 0.1, 0.05, 0, 0, 0]; initialDMFractionsForbs=[0.2, 0.2, 0.15, 0.05, 0.1, 0.15, 0.1, 0.05, 0, 0, 0]; PhotosyntheticEfficiency=0.01; PhotosynthesisCurveFactor=0.8; FractionPAR=0.5; ReferenceCO2=380; CO2EffectScaleFactor=700; CO2EffectOffsetFactor=600; CO2EffectMinimum=0.7; CO2EffectExponent=2; ReproSeasonDurationCoeff=2; ReproSeasonShouldersLengthFactor=1; ReproSeasonOnsetDurationFactor=0.6; RelativeTurnoverEmerging=2; DetachmentDroughtCoefficient=3; DetachmentDroughtEffectMin=0.1; TurnoverStockFactor=0.01; TurnoverDefoliationEffectMin=0.025; MinimumGreenLeafProp=0.8; MinimumGreenRootProp=0.5
          initialDMFractionsLegumes=[0.16, 0.23, 0.22, 0.05, 0.03, 0.05, 0.05, 0.01, 0.04, 0.08, 0.08]
          LinearInterpolationFunction FVPDFunction
        Soil: ASCOrder=R; SoilType=Typic Fluvial Recent Soils; LocalName=Huangarua_35a1; Country=New Zealand; Latitude=-41; Longitude=174
          DataSource=Profile descriptions provided by Smap based on the work done by Trevor Webb.
          Physical
            Thickness  ParticleSizeSand  ParticleSizeSilt  ParticleSizeClay  Rocks  BD     AirDry  LL15   DUL    SAT    KS
            92         14                66                20                10     1.106  0.072   0.144  0.354  0.449  2400
            93         14                66                20                10     1.106  0.072   0.144  0.354  0.449  2400
            188        14                66                20                50     0.653  0.042   0.047  0.138  0.236  1440
            188        14                66                20                50     0.653  0.042   0.047  0.138  0.236  1440
            189        14                66                20                50     0.653  0.042   0.047  0.138  0.236  1440
            250        90                7.5               2.5               50     0.646  0.015   0.015  0.076  0.239  9600
            250        90                7.5               2.5               50     0.646  0.015   0.015  0.076  0.239  9600
            250        90                7.5               2.5               50     0.646  0.015   0.015  0.076  0.239  9600
            250        90                7.5               2.5               50     0.646  0.015   0.015  0.076  0.239  9600
            250        90                7.5               2.5               50     0.646  0.015   0.015  0.076  0.239  9600
            SoilCrop AgPRyegrassSoil
              LL=[0.144, 0.144, 0.047, 0.047, 0.047, 0.015, 0.015, 0.015, 0.015, 0.015]
              KL=[0.103835, 0.103835, 0.0231686, 0.0231686, 0.0231686, 0, 0, 0, 0, 0]
              XF=[1, 1, 0.81, 0.81, 0.81, 0, 0, 0, 0, 0]
            SoilCrop AgPWhiteCloverSoil
              LL=[0.144, 0.144, 0.047, 0.047, 0.047, 0.015, 0.015, 0.015, 0.015, 0.015]
              KL=[0.135051, 0.135051, 0.00542691, 0.00542691, 0.00542691, 0, 0, 0, 0, 0]
              XF=[1, 1, 0.766, 0.766, 0.766, 0, 0, 0, 0, 0]
          Organic: FOMCNRatio=40; CarbonUnits=Total
            Thickness  Carbon    SoilCNRatio  FBiom      FInert    FOM
            50         3.5       10.4         0.0788566  0.30541   231.228
            50         3.5       10.4         0.0610103  0.365438  224.294
            50         3.5       10.4         0.0477893  0.416251  180.55
            50         2.90181   10.4         0.037995   0.477639  140.612
            50         2.01108   10.4         0.0307392  0.549551  109.509
            50         1.414     10.4         0.025364   0.614528  85.2856
            50         1.01377   10.4         0.0213819  0.673618  66.4205
            50         0.745486  10.4         0.0184319  0.727416  51.7283
            50         0.56565   10.4         0.0162465  0.776021  40.2861
            50         0.445103  10.4         0.0146275  0.819115  31.3748
            250        0.273824  10.4         0.0118814  0.911701  78.8161
            250        0.209991  10.4         0.0104198  0.976109  0
            500        0.200497  10.4         0.0100442  0.990829  0
            500        0.200009  10.4         0.0100022  0.996255  0
          Chemical: PHUnits=Water
            Thickness  PH  CEC
            185        7   20.337
            565        7   11.0105
            1250       7   1.62056
          Water: Thickness=[185, 565, 1250]; InitialValues=[0.354, 0.138, 0.076]; FilledFromTop=false
          WaterBalance SoilWater: SummerDate=1-oct; SummerU=9; SummerCona=4.4; WinterDate=1-apr; WinterU=4; WinterCona=2; DiffusConst=88; DiffusSlope=35; Salb=0.13; CN2Bare=83; CNRed=27; CNCov=0.8; PSIDul=-100
            Thickness  SWCON  KLAT
            185        0.5    0
            565        0.35   0
            1250       0.5    0
          SoilTemperature Temperature
          Solute NO3: Thickness=[185, 565, 1250]; InitialValues=[11.717, 7.548, 0.735]; InitialValuesUnits=kg/ha; WaterTableConcentration=0; D0=0; DepthConstant=0; MaxDepthSoluteAccessible=0; RunoffEffectivenessAtMovingSolute=0; MaxEffectiveRunoff=0
          Solute NH4: Thickness=[185, 565, 1250]; InitialValues=[1.757, 1.132, 0.11]; InitialValuesUnits=kg/ha; WaterTableConcentration=0; D0=0; DepthConstant=0; MaxDepthSoluteAccessible=0; RunoffEffectivenessAtMovingSolute=0; MaxEffectiveRunoff=0
          Solute Urea: Thickness=[185, 565, 1250]; InitialValues=[0, 0, 0]; InitialValuesUnits=ppm; WaterTableConcentration=0; D0=0; DepthConstant=0; MaxDepthSoluteAccessible=0; RunoffEffectivenessAtMovingSolute=0; MaxEffectiveRunoff=0
          Nutrient
        Report
          VariableNames:
            [Weather].FileName as Agent
            [Soil].LocalName as Soil
            [Treatment].TreatmentScript.TreatmentType as Source
            [Treatment].TreatmentScript.myApplicationDate as ApplicationDate
            [Treatment].TreatmentScript.NApplied as NApplied
            Max of [DateChanger].DateChangerScript.DaysSinceApplication from [DateChanger].DateChangerScript.ApplicationDate to [DateChanger].DateChangerScript.ApplicationDatePlus360 as DaysSinceApplication
            Sum of [Outputs].Script.N2O300mm from [DateChanger].DateChangerScript.ApplicationDate to [DateChanger].DateChangerScript.ApplicationDatePlus360 as sumN2OPost360
            Sum of [Irrigation].IrrigationApplied from [DateChanger].DateChangerScript.ApplicationDate to [DateChanger].DateChangerScript.ApplicationDatePlus360 as sumIrrigation
          EventNames:
            [Clock].EndOfSimulation
